// COMSOL Multiphysics 5.3.0.260 model "1D Simulation model_CNNWorking_5nm_negative_first.mph"
// 1D Simulation model RC QY alpha descriptions RCswitch
// Derived non-destructively from 1D Simulation model_RC_QY_alpha_descriptions.mph. Adds discrete parameter RC_on. RC_on=1 uses the original coupled Ru-Cdl interfacial-potential equation. RC_on=0 enforces Eint=E, I_C=0, and I_total=I_F without dividing by Ru. Use only RC_on=0 or RC_on=1. The saved default is RC_on=1 with the source model's Ru and Cdl values. On 2026-07-28, removed stale Job Configuration p1 (Cdl batch sweep 0.05, 0.1, 0.2, 0.4, 0.8 F/m^2), which was nesting the visible D-only Study sweep. RC_on remains enabled and Cdl remains fixed at its global value during D sweeps. Only the incomplete mixed D-by-Cdl sol1/sol3 data and tbl3 were cleared; prior Ru and Cdl result tables were preserved.
// Outline of the model tree

Parameters
  F = 96485[C/mol]  // Faraday constant
  n = 1  // number of electrons
  D = 1e-9[m^2/s]  // Common diffusion coefficient assigned to m, o1, r1, and me
  CM0 = 0.1[mol/m^3]  // Initial (bulk) Conc. of Parent
  E01red = -1.2[V]  // Formal potential of the M/R1 redox couple
  E01ox = 1.4[V]  // Formal potential of the O1/M redox couple
  k0o = 0.01[m/s]  // Standard heterogeneous electron-transfer rate constant of the O1/M couple
  k0r = 0.01[m/s]  // Standard heterogeneous electron-transfer rate constant of the M/R1 couple
  f = 38.94[1/V]  // F/RT
  kem = exp(lnkem)*1[1/s]  // Emission rate constant
  kann = exp(lnkann)*1[m^3/(mol*s)]  // Annihilation rate constant
  t = 0.500[s]  // time
  lnkem = 16.5  // Nat. Logs of rate constants
  lnkann = 12  // anihilation rate constant
  pi = 3.1415926  // pi
  elec_r = 0.001[m]  // Radius used only for the planar area multiplier; does not introduce radial diffusion
  E = E_cat+(E_an-E_cat)*flc1hs(sin(2*pi*t/tau-pi),d)  // Programmed applied potential before the lumped Ru-Cdl response
  E_cat = -1.4[V]  // Programmed cathodic potential level, not interfacial potential
  E_an = 1.6[V]  // Programmed anodic potential level, not interfacial potential
  tau = 1[s]  // Full waveform period; each potential level lasts approximately tau/2
  d = 5e-6  // Dimensionless numerical smoothing width; reproduce potentialstat rise time; not a physical RC time constant
  Ru = 1e3[ohm]  // Uncompensated lumped series resistance used only when RC_on=1; require Ru>0 in RC mode
  Cdl = 0.2[F/m^2]  // Area-normalized double-layer capacitance used only when RC_on=1
  Aelec = pi*elec_r^2  // Geometric electrode area
  Cdl_tot = Cdl*Aelec  // Total double-layer capacitance; inactive when RC_on=0
  tauRC = Ru*Cdl_tot  // Ru-Cdl time constant; inactive when RC_on=0
  phi_ann = 0.5  // Fraction of annihilation events producing the excited state
  phi_em = 0.05  // Fraction of excited-state decays producing emitted photons
  alpha = 0.5  // Shared cathodic Butler-Volmer transfer coefficient; anodic coefficient is 1-alpha; constrain to 0<alpha<1
  RC_on = 1  // Discrete RC switch: 1 enables Ru-Cdl response; 0 enforces Eint=E and I_C=0; use only 0 or 1

Variables
  varRC "Variables"
    Eint = RC_on*phiint*1[V]+(1-RC_on)*E  // Interfacial potential; dynamic phiint state when RC_on=1 and exactly the programmed potential E when RC_on=0
    etaoxRC = Eint-E01ox  // Oxidation overpotential using Eint
    etaredRC = Eint-E01red  // Reduction overpotential using Eint
    kfoxRC = k0o*exp(-alpha*f*etaoxRC)  // Oxidation-couple reduction coefficient
    kboxRC = k0o*exp((1-alpha)*f*etaoxRC)  // Oxidation-couple oxidation coefficient
    kfredRC = k0r*exp(-alpha*f*etaredRC)  // Reduction-couple reduction coefficient
    kbredRC = k0r*exp((1-alpha)*f*etaredRC)  // Reduction-couple oxidation coefficient
    joxRC = -kfoxRC*o1+kboxRC*m  // Oxidation-couple molar flux
    jredRC = -kfredRC*m+kbredRC*r1  // Reduction-couple molar flux
    I_F = intopRC((-n*F*(tds.ndflux_o1-tds.ndflux_r1))*Aelec)  // Total faradaic current
    I_C = RC_on*((E-Eint)/(RC_on*Ru+(1-RC_on)*1[ohm])-I_F)  // Double-layer charging current; forced to zero when RC_on=0
    I_total = I_F+I_C  // Total external current; equals I_F when RC_on=0

Couplings
  intopRC: Integration on boundaries 1

Geometry
  geom1 "Geometry 1" (1D, length unit m)
    i1: Interval | p2 = 0.004; p = {0, 0.004}
    fin: Finalize "Form Union"

Physics
  tds: DilutedSpecies "Transport of Diluted Species" on all domains
    dependent variable m = {m, o1, r1, me}
    TransportMechanism.Convection = 0
    cdm1: ConvectionDiffusionMigration "Transport Properties 1" (default)
      D_m = D
      D_o1 = D
      D_r1 = D
      D_me = D
      D_o2 = D
      D_r2 = D
      D_r3 = D
    nflx1: NoFlux (default)
    init1: init "Initial Values 1" (default) | initc = {CM0, 0, 0, 0}
    fl1: Fluxes "Flux 1" on boundaries 1
      FluxType = GeneralInwardFlux
      species = {1, 1, 1, 0}
      N0 = {-joxRC+jredRC, joxRC, -jredRC, +kann*r1*o1-kem*me}
    reac1: Reactions on all domains
      R_m = (2-phi_ann)*kann*o1*r1+kem*me
      R_o1 = -kann*o1*r1
      R_r1 = -kann*o1*r1
      R_me = phi_ann*kann*o1*r1-kem*me
    conc1: Concentration on boundaries 2 | species = {1, 1, 1, 1}; c0 = {CM0, 0, 0, 0}

Mesh
  mesh1 "Mesh 1"
    size: MeshSizeDefault | hgrad = 1.05; custom = on; hmax = 1
    edg1: Edge on domains 1
      size1: Size on boundaries 1 | hmax = 5e-9[m]; hmin = 4.5e-9[m]; hgrad = 1.05; custom = on

Studies
  std1 "Study 1"
    param2: Parametric "Parametric Sweep 2" (disabled)
      pname = {E01ox, E_an}
      plistarr = {"1, 1.2, 1.4, 1.6, 1.8", "1.4, 1.6, 1.8, 2.0, 2.2"}
      punit = {, }
    time: Transient "Time Dependent"
      tlist = range(0,min(tau/10000,tauRC/20),min(tau/100,5*tauRC)) range(min(tau/100,5*tauRC),tau/1000,tau/2-min(tau/100,5*tauRC)) range(tau/2-min(tau/100,5*tauRC),min(tau/10000,tauRC/20),tau/2+min(tau/100,5*tauRC)) range(tau/2+min(tau/100,5*tauRC),tau/1000,tau-min(tau/100,5*tauRC)) range(tau-min(tau/100,5*tauRC),min(tau/10000,tauRC/20),tau)

Solver configurations
  sol1 "Solution 1" (study std1)
    v1: Variables "Dependent Variables 1"
    t1: Time "Time-Dependent Solver 1"
      tlist = range(0,min(tau/10000,tauRC/20),min(tau/100,5*tauRC)) range(min(tau/100,5*tauRC),tau/1000,tau/2-min(tau/100,5*tauRC)) range(tau/2-min(tau/100,5*tauRC),min(tau/10000,tauRC/20),tau/2+min(tau/100,5*tauRC)) range(tau/2+min(tau/100,5*tauRC),tau/1000,tau-min(tau/100,5*tauRC)) range(tau-min(tau/100,5*tauRC),min(tau/10000,tauRC/20),tau)
      rtol = 0.001
      maxorder = 2
      fc1: FullyCoupled | linsolver = d1; maxiter = 8; damp = 0.9; jtech = once
      d1: Direct | linsolver = pardiso
  sol3 "Parametric Solutions 2" (study std1)
  sol4 "Parametric Solutions 3" (study std1)
  sol15 "Parametric Solutions 1" (study std1)
  sol31 "Parametric Solutions 4" (study std1)

Datasets
  dset1: Solution | solution = sol1
  dset2: Solution | solution = none
  dset3: Solution | solution = sol3
  dset4: Solution | solution = sol4
  dset5: Solution | solution = sol15
  dset6: Solution | solution = sol31

Derived values
  int1: IntLine "ECL" on domains 1
    data = dset1
    table = tbl13
    expr = phi_em*kem*me*Aelec
    unit = mol/s
    descr = quantum-yield-adjusted ECL emission rate
  pev1: EvalPoint "Currents and potentials" on boundaries 1
    data = dset6
    table = tbl13
    tablecols = level2
    expr = {comp1.I_total, comp1.I_F, comp1.I_C, E, comp1.Eint}
    unit = {A, A, A, V, V}
    descr = {total external current; equals faradaic current when RC_on=0, faradaic current, double-layer charging current; zero when RC_on=0, programmed applied potential, interfacial potential; equals programmed potential when RC_on=0}
  gevTauVerify: EvalGlobal "Global Evaluation" (disabled)
    data = dset5
    table = new
    expr = {tau, E, comp1.Eint, comp1.I_F, RC_on, Cdl, D}
    unit = {s, V, V, A, , F/m^2, m^2/s}
    descr = {swept period, programmed potential, RC-adjusted interfacial potential, faradaic current, RC switch, fixed double-layer capacitance, fixed diffusion coefficient}

Tables
  tbl1: Table "Ru-1"
    // RC_on=1 verification using the source model's Ru and Cdl values.
    Time (s) | Ru=10, total external current; equals faradaic current when RC_on=0 (A), Point: 1 | Ru=10, faradaic current (A), Point: 1 | Ru=10, double-layer charging current; zero when RC_on=0 (A), Point: 1 | Ru=10, programmed applied potential (V), Point: 1 | Ru=10, interfacial potential; equals programmed potential when RC_on=0 (V), Point: 1 | Ru=30, total external current; equals faradaic current when RC_on=0 (A), Point: 1 | Ru=30, faradaic current (A), Point: 1 | Ru=30, double-layer charging current; zero when RC_on=0 (A), Point: 1 | Ru=30, programmed applied potential (V), Point: 1 | Ru=30, interfacial potential; equals programmed potential when RC_on=0 (V), Point: 1 | Ru=100, total external current; equals faradaic current when RC_on=0 (A), Point: 1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
    0 | 0 | 1.159e-25 | -1.159e-25 | 0.122507 | 0.122507 | -4.62593e-19 | 1.159e-25 | -4.62593e-19 | 0.122507 | 0.122507 | 0
    0.001 | 1.68491e-05 | 1.68681e-05 | -1.89635e-08 | 1.5 | 1.49983 | 1.7288e-05 | 1.71929e-05 | 9.5115e-08 | 1.5 | 1.49948 | 1.91465e-05
    0.002 | 1.18666e-05 | 1.18732e-05 | -6.64511e-09 | 1.5 | 1.49988 | 1.20181e-05 | 1.19869e-05 | 3.1219e-08 | 1.5 | 1.49964 | 1.25787e-05
    0.003 | 9.67981e-06 | 9.68339e-06 | -3.57576e-09 | 1.5 | 1.4999 | 9.75928e-06 | 9.7424e-06 | 1.68742e-08 | 1.5 | 1.49971 | 1.00562e-05
    0.004 | 8.37437e-06 | 8.37671e-06 | -2.33522e-09 | 1.5 | 1.49992 | 8.42754e-06 | 8.41683e-06 | 1.07091e-08 | 1.5 | 1.49975 | 8.61221e-06
    0.005 | 7.49149e-06 | 7.49315e-06 | -1.6578e-09 | 1.5 | 1.49993 | 7.52402e-06 | 7.51637e-06 | 7.65691e-09 | 1.5 | 1.49977 | 7.6574e-06
    0.006 | 6.8357e-06 | 6.83696e-06 | -1.25761e-09 | 1.5 | 1.49993 | 6.86346e-06 | 6.8576e-06 | 5.85666e-09 | 1.5 | 1.49979 | 6.96573e-06
    0.007 | 6.32491e-06 | 6.32596e-06 | -1.04795e-09 | 1.5 | 1.49994 | 6.35124e-06 | 6.34663e-06 | 4.61661e-09 | 1.5 | 1.49981 | 6.42679e-06
    0.008 | 5.91576e-06 | 5.91658e-06 | -8.22692e-10 | 1.5 | 1.49994 | 5.93475e-06 | 5.93102e-06 | 3.73196e-09 | 1.5 | 1.49982 | 5.99723e-06
    0.009 | 5.57857e-06 | 5.57922e-06 | -6.57884e-10 | 1.5 | 1.49994 | 5.59172e-06 | 5.58859e-06 | 3.12686e-09 | 1.5 | 1.49983 | 5.64537e-06
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  tbl2: Table "Cdl-1"
    // ECL (phi_em*kem*me*Aelec)
    Time (s) | Cdl=0.05, quantum-yield-adjusted ECL emission rate (mol/s) | Cdl=0.1, quantum-yield-adjusted ECL emission rate (mol/s) | Cdl=0.2, quantum-yield-adjusted ECL emission rate (mol/s) | Cdl=0.4, quantum-yield-adjusted ECL emission rate (mol/s) | Cdl=0.8, quantum-yield-adjusted ECL emission rate (mol/s) | Cdl=0.05, total external current; equals faradaic current when RC_on=0 (A), Point: 1 | Cdl=0.05, faradaic current (A), Point: 1 | Cdl=0.05, double-layer charging current; zero when RC_on=0 (A), Point: 1 | Cdl=0.05, programmed applied potential (V), Point: 1 | Cdl=0.05, interfacial potential; equals programmed potential when RC_on=0 (V), Point: 1 | Cdl=0.1, total external current; equals faradaic current when RC_on=0 (A), Point: 1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
    0 | 2.62897e-56 | 2.62897e-56 | 2.62897e-56 | 2.62897e-56 | 2.62897e-56 | -1.38778e-20 | 1.159e-25 | -1.38779e-20 | 0.122507 | 0.122507 | 0
    0.001 | 8.30394e-37 | 1.02241e-36 | 9.26115e-40 | 6.08348e-45 | -1.36201e-49 | 2.84111e-05 | 2.32578e-05 | 5.15334e-06 | 1.5 | 1.47159 | 7.36104e-05
    0.002 | 1.46599e-37 | 3.75424e-36 | 9.29627e-37 | 1.21061e-39 | 1.88629e-44 | 1.43856e-05 | 1.36225e-05 | 7.63079e-07 | 1.5 | 1.48561 | 2.1167e-05
    0.003 | 1.63498e-37 | 1.35035e-37 | 4.92585e-37 | 3.179e-37 | 1.58138e-41 | 1.0892e-05 | 1.05626e-05 | 3.29477e-07 | 1.5 | 1.48911 | 1.28687e-05
    0.004 | 1.92693e-38 | 5.37014e-38 | 2.05988e-37 | 8.04804e-37 | 1.2361e-39 | 9.12057e-06 | 8.9274e-06 | 1.93176e-07 | 1.5 | 1.49088 | 1.01267e-05
    0.005 | 7.91014e-39 | -1.19117e-36 | 9.91271e-38 | 4.84304e-37 | 7.16935e-38 | 8.008e-06 | 7.87714e-06 | 1.30866e-07 | 1.5 | 1.49199 | 8.6495e-06
    0.006 | -5.85583e-36 | 9.00606e-38 | 1.30742e-36 | 2.87163e-37 | 5.20579e-37 | 7.22605e-06 | 7.1295e-06 | 9.6551e-08 | 1.5 | 1.49277 | 7.67261e-06
    0.007 | 9.81169e-37 | 2.01242e-38 | -8.29275e-38 | 2.39371e-37 | 7.4341e-37 | 6.63203e-06 | 6.55739e-06 | 7.4632e-08 | 1.5 | 1.49337 | 6.97368e-06
    0.008 | -2.97852e-37 | 1.94006e-35 | 2.41063e-38 | 9.41328e-38 | 6.41895e-37 | 6.16265e-06 | 6.10296e-06 | 5.9696e-08 | 1.5 | 1.49384 | 6.43872e-06
    0.009 | 9.77277e-39 | 6.28518e-35 | 1.73026e-36 | 5.20172e-38 | 4.74007e-37 | 5.78214e-06 | 5.73281e-06 | 4.93325e-08 | 1.5 | 1.49422 | 6.00727e-06
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  tbl3: Table "D-0"
    // ECL (phi_em*kem*me*Aelec)
    Time (s) | D=5E-10, quantum-yield-adjusted ECL emission rate (mol/s) | D=7.5E-10, quantum-yield-adjusted ECL emission rate (mol/s) | D=1E-9, quantum-yield-adjusted ECL emission rate (mol/s) | D=1.25E-9, quantum-yield-adjusted ECL emission rate (mol/s) | D=1.5E-9, quantum-yield-adjusted ECL emission rate (mol/s) | D=5E-10, total external current; equals faradaic current when RC_on=0 (A), Point: 1 | D=5E-10, faradaic current (A), Point: 1 | D=5E-10, double-layer charging current; zero when RC_on=0 (A), Point: 1 | D=5E-10, programmed applied potential (V), Point: 1 | D=5E-10, interfacial potential; equals programmed potential when RC_on=0 (V), Point: 1 | D=7.5E-10, total external current; equals faradaic current when RC_on=0 (A), Point: 1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
    0 | 2.51248e-56 | 2.56429e-56 | 2.62897e-56 | 2.70353e-56 | 2.78568e-56 | 0 | 9.24462e-26 | -9.24462e-26 | 0.122507 | 0.122507 | 0
    0.001 | 6.55395e-40 | 8.02742e-40 | 9.26115e-40 | 1.10516e-39 | 1.89399e-39 | 0.000279597 | 8.6525e-08 | 0.000279511 | 1.5 | 1.2204 | 0.000279598
    0.002 | 6.72217e-37 | 8.15809e-37 | 9.29627e-37 | 1.09745e-36 | 1.09477e-36 | 6.62636e-05 | 1.88128e-05 | 4.74508e-05 | 1.5 | 1.43374 | 6.84291e-05
    0.003 | 3.53593e-37 | 2.15986e-35 | 4.92585e-37 | 5.49928e-37 | 5.95079e-37 | 2.3486e-05 | 1.08962e-05 | 1.25897e-05 | 1.5 | 1.47651 | 2.62954e-05
    0.004 | 1.4476e-37 | 1.40345e-37 | 2.05988e-37 | 4.53324e-37 | 2.48598e-37 | 1.16572e-05 | 8.03385e-06 | 3.62333e-06 | 1.5 | 1.48834 | 1.38752e-05
    0.005 | 6.88944e-38 | 8.17172e-38 | 9.91271e-38 | 7.78819e-37 | 1.15454e-37 | 7.93543e-06 | 6.63644e-06 | 1.29899e-06 | 1.5 | 1.49206 | 9.6835e-06
    0.006 | 3.53947e-38 | 4.41318e-38 | 1.30742e-36 | 4.93485e-39 | 1.07148e-37 | 6.3747e-06 | 5.77336e-06 | 6.01348e-07 | 1.5 | 1.49363 | 7.83229e-06
    0.007 | 2.11532e-38 | 2.62722e-38 | -8.29275e-38 | -7.52528e-37 | 9.53297e-38 | 5.56177e-06 | 5.18488e-06 | 3.76899e-07 | 1.5 | 1.49444 | 6.83512e-06
    0.008 | 1.33132e-38 | 1.64732e-38 | 2.41063e-38 | -3.34483e-37 | 1.5793e-38 | 5.02447e-06 | 4.74879e-06 | 2.75682e-07 | 1.5 | 1.49498 | 6.17074e-06
    0.009 | 8.28172e-39 | 1.02211e-38 | 1.73026e-36 | -4.33629e-36 | 1.4203e-38 | 4.61715e-06 | 4.40444e-06 | 2.12708e-07 | 1.5 | 1.49538 | 5.66744e-06
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  tbl4: Table "CM0-1"
    // ECL (phi_em*kem*me*Aelec)
    Time (s) | CM0=0.001, quantum-yield-adjusted ECL emission rate (mol/s) | CM0=0.01, quantum-yield-adjusted ECL emission rate (mol/s) | CM0=0.03, quantum-yield-adjusted ECL emission rate (mol/s) | CM0=0.1, quantum-yield-adjusted ECL emission rate (mol/s) | CM0=0.3, quantum-yield-adjusted ECL emission rate (mol/s) | CM0=1, quantum-yield-adjusted ECL emission rate (mol/s) | CM0=0.001, total external current; equals faradaic current when RC_on=0 (A), Point: 1 | CM0=0.001, faradaic current (A), Point: 1 | CM0=0.001, double-layer charging current; zero when RC_on=0 (A), Point: 1 | CM0=0.001, programmed applied potential (V), Point: 1 | CM0=0.001, interfacial potential; equals programmed potential when RC_on=0 (V), Point: 1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
    0 | 2.62897e-60 | 2.62897e-58 | 2.36607e-57 | 2.62897e-56 | 2.36607e-55 | 2.62897e-54 | 0 | 1.159e-27 | -1.159e-27 | 0.122507 | 0.122507
    0.001 | 1.25655e-43 | 9.96343e-42 | 8.58898e-41 | 9.26115e-40 | 8.16512e-39 | 8.03064e-38 | 0.000278864 | 1.23154e-09 | 0.000278863 | 1.5 | 1.22114
    0.002 | 1.86798e-40 | 1.7244e-38 | 1.31675e-37 | 9.29627e-37 | 3.70652e-36 | 1.11306e-35 | 5.67555e-05 | 2.79206e-07 | 5.64763e-05 | 1.5 | 1.44324
    0.003 | -2.8626e-39 | -9.9991e-39 | 1.34603e-37 | 4.92585e-37 | 1.26028e-35 | 2.93407e-36 | 1.15123e-05 | 1.52396e-07 | 1.13599e-05 | 1.5 | 1.48849
    0.004 | -2.22446e-39 | 2.09862e-38 | 7.68396e-38 | 2.05988e-37 | 4.45649e-37 | 9.99309e-37 | 2.23995e-06 | 1.12406e-07 | 2.12754e-06 | 1.5 | 1.49776
    0.005 | 6.79701e-40 | 1.5675e-38 | 2.73645e-39 | 9.91271e-38 | 1.96223e-37 | 3.71838e-37 | 4.17592e-07 | 9.29682e-08 | 3.24623e-07 | 1.5 | 1.49958
    0.006 | 3.2563e-40 | 1.15869e-38 | 1.65078e-38 | 1.30742e-36 | 3.21814e-36 | 1.96647e-37 | 1.01411e-07 | 8.10877e-08 | 2.03231e-08 | 1.5 | 1.4999
    0.007 | 7.99562e-41 | 8.51573e-39 | 1.9419e-38 | -8.29275e-38 | -1.37206e-37 | 2.05727e-36 | 7.09549e-08 | 7.29425e-08 | -1.98756e-09 | 1.5 | 1.49993
    0.008 | 4.61407e-40 | 6.38272e-39 | 1.16488e-38 | 2.41063e-38 | 1.92292e-37 | 2.5564e-38 | 6.62931e-08 | 6.68002e-08 | -5.07016e-10 | 1.5 | 1.49993
    0.009 | -9.58615e-40 | 5.15092e-39 | 8.21727e-39 | 1.73026e-36 | 2.27081e-38 | 2.22676e-37 | 6.31157e-08 | 6.19845e-08 | 1.13124e-09 | 1.5 | 1.49994
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  tbl5: Table "lnkann-1"
    // ECL (phi_em*kem*me*Aelec)
    Time (s) | lnkann=2, quantum-yield-adjusted ECL emission rate (mol/s) | lnkann=4, quantum-yield-adjusted ECL emission rate (mol/s) | lnkann=6, quantum-yield-adjusted ECL emission rate (mol/s) | lnkann=8, quantum-yield-adjusted ECL emission rate (mol/s) | lnkann=10, quantum-yield-adjusted ECL emission rate (mol/s) | lnkann=12, quantum-yield-adjusted ECL emission rate (mol/s) | lnkann=14, quantum-yield-adjusted ECL emission rate (mol/s) | lnkann=2, total external current; equals faradaic current when RC_on=0 (A), Point: 1 | lnkann=2, faradaic current (A), Point: 1 | lnkann=2, double-layer charging current; zero when RC_on=0 (A), Point: 1 | lnkann=2, programmed applied potential (V), Point: 1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
    0 | 1.19355e-60 | 8.8192e-60 | 6.51656e-59 | 4.81512e-58 | 3.55792e-57 | 2.62897e-56 | 1.94256e-55 | 0 | 1.159e-25 | -1.159e-25 | 0.122507
    0.001 | 3.96667e-40 | -9.20242e-40 | 2.28911e-42 | 1.57684e-40 | 1.54872e-39 | 9.26115e-40 | 6.84049e-39 | 0.0002796 | 1.18326e-07 | 0.000279481 | 1.5
    0.002 | 2.3598e-39 | -1.50358e-38 | 4.67525e-39 | 2.58634e-38 | 2.07973e-37 | 9.29627e-37 | 1.32627e-36 | 7.01343e-05 | 2.57417e-05 | 4.43927e-05 | 1.5
    0.003 | 9.18977e-38 | 2.21226e-38 | 5.2461e-39 | 1.40677e-37 | 3.00525e-37 | 4.92585e-37 | 3.17306e-37 | 2.86032e-05 | 1.55397e-05 | 1.30636e-05 | 1.5
    0.004 | 2.12067e-36 | -1.24484e-38 | 1.05566e-38 | 2.10468e-38 | 1.31036e-36 | 2.05988e-37 | -1.43116e-36 | 1.57731e-05 | 1.14698e-05 | 4.30321e-06 | 1.5
    0.005 | 2.56369e-38 | 1.12146e-39 | 8.92247e-39 | -4.01176e-37 | 2.27661e-37 | 9.91271e-38 | -5.69088e-37 | 1.11606e-05 | 9.44743e-06 | 1.71319e-06 | 1.5
    0.006 | 1.204e-39 | -1.8258e-37 | 9.65572e-39 | 4.0529e-38 | 3.96645e-36 | 1.30742e-36 | -1.23802e-36 | 9.09946e-06 | 8.21646e-06 | 8.82993e-07 | 1.5
    0.007 | 8.421e-41 | 1.76201e-38 | 1.34089e-38 | 4.85033e-38 | -1.20733e-37 | -8.29275e-38 | 1.11336e-37 | 7.91235e-06 | 7.36395e-06 | 5.48404e-07 | 1.5
    0.008 | 4.76517e-40 | -3.72062e-40 | 7.96698e-39 | 4.28899e-38 | -8.07177e-38 | 2.41063e-38 | -1.73484e-37 | 7.13366e-06 | 6.73766e-06 | 3.95998e-07 | 1.5
    0.009 | -7.62702e-39 | 7.33473e-39 | 6.80536e-37 | 3.98606e-38 | 3.89584e-38 | 1.73026e-36 | 2.67133e-37 | 6.55714e-06 | 6.24963e-06 | 3.07511e-07 | 1.5
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  tbl6: Table "k0r/k0o-0"
    // ECL (phi_em*kem*me*Aelec)
    Time (s) | k0o=1E-4, k0r=1E-4, quantum-yield-adjusted ECL emission rate (mol/s) | k0o=3E-4, k0r=3E-4, quantum-yield-adjusted ECL emission rate (mol/s) | k0o=0.001, k0r=0.001, quantum-yield-adjusted ECL emission rate (mol/s) | k0o=0.003, k0r=0.003, quantum-yield-adjusted ECL emission rate (mol/s) | k0o=0.01, k0r=0.01, quantum-yield-adjusted ECL emission rate (mol/s) | k0o=0.03, k0r=0.03, quantum-yield-adjusted ECL emission rate (mol/s) | k0o=0.001, k0r=0.001, quantum-yield-adjusted ECL emission rate (mol/s) | k0o=0.003, k0r=0.003, quantum-yield-adjusted ECL emission rate (mol/s) | k0o=0.01, k0r=0.01, quantum-yield-adjusted ECL emission rate (mol/s) | k0o=0.1, k0r=0.1, quantum-yield-adjusted ECL emission rate (mol/s) | k0o=1, k0r=1, quantum-yield-adjusted ECL emission rate (mol/s)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
    0 | 2.62897e-56 | 2.62897e-56 | 2.62897e-56 | 2.62897e-56 | 2.62897e-56 | 2.62897e-56 | 2.62897e-56 | 2.62897e-56 | 2.62897e-56 | 2.62897e-56 | 2.62897e-56
    0.001 | 3.9683e-39 | 7.54513e-39 | 1.18812e-38 | 1.45841e-38 | 1.59122e-38 | 1.6163e-38 | 1.18812e-38 | 1.45841e-38 | 1.59122e-38 | 1.63147e-38 | 1.63656e-38
    0.002 | 6.10167e-37 | 8.44383e-37 | 9.36302e-37 | 1.00447e-36 | 9.41228e-37 | 9.81765e-37 | 9.36302e-37 | 1.00447e-36 | 9.41228e-37 | 9.50613e-37 | 9.12925e-37
    0.003 | 4.5842e-37 | 4.06329e-37 | 3.99022e-37 | 3.25399e-37 | 5.45821e-38 | 3.07508e-37 | 3.99022e-37 | 3.25399e-37 | 5.45821e-38 | 3.0632e-37 | 3.03798e-37
    0.004 | 2.08209e-37 | 1.68515e-37 | 1.3637e-37 | 1.25063e-37 | 1.25358e-37 | 1.18719e-37 | 1.3637e-37 | 1.25063e-37 | 1.25358e-37 | 1.18482e-37 | 1.19604e-37
    0.005 | 1.01401e-37 | 7.22651e-38 | 6.50781e-38 | 2.18021e-38 | 5.5354e-38 | 5.09237e-38 | 6.50781e-38 | 2.18021e-38 | 5.5354e-38 | 9.11699e-38 | 1.07362e-37
    0.006 | 3.54989e-38 | 4.16688e-38 | 5.06881e-38 | 3.29788e-38 | 2.96959e-38 | 2.98138e-38 | 5.06881e-38 | 3.29788e-38 | 2.96959e-38 | 3.37782e-36 | 1.40742e-35
    0.007 | 3.45233e-38 | 2.67e-37 | 1.87696e-38 | 1.82911e-38 | 1.76778e-38 | 1.67341e-38 | 1.87696e-38 | 1.82911e-38 | 1.76778e-38 | -2.315e-37 | -1.03998e-36
    0.008 | -1.16996e-37 | 1.5471e-39 | 1.02294e-38 | 1.13284e-38 | -2.96785e-36 | 2.77134e-38 | 1.02294e-38 | 1.13284e-38 | -2.96785e-36 | 2.16878e-38 | 4.91727e-38
    0.009 | 1.04438e-36 | 1.49004e-38 | 8.08712e-39 | 6.76589e-39 | 3.38834e-37 | 4.36222e-39 | 8.08712e-39 | 6.76589e-39 | 3.38834e-37 | 3.83086e-39 | 2.19258e-39
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  tbl7: Table "lnkem-0 if not << lnkann"
    // ECL (phi_em*kem*me*Aelec)
    Time (s) | lnkem=8.5, quantum-yield-adjusted ECL emission rate (mol/s) | lnkem=10.5, quantum-yield-adjusted ECL emission rate (mol/s) | lnkem=12.5, quantum-yield-adjusted ECL emission rate (mol/s) | lnkem=14.5, quantum-yield-adjusted ECL emission rate (mol/s) | lnkem=16.5, quantum-yield-adjusted ECL emission rate (mol/s) | lnkem=18.5, quantum-yield-adjusted ECL emission rate (mol/s) | lnkem=20.5, quantum-yield-adjusted ECL emission rate (mol/s) | lnkem=8.5, total external current; equals faradaic current when RC_on=0 (A), Point: 1 | lnkem=8.5, faradaic current (A), Point: 1 | lnkem=8.5, double-layer charging current; zero when RC_on=0 (A), Point: 1 | lnkem=8.5, programmed applied potential (V), Point: 1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
    0 | 1.37352e-58 | 9.84148e-58 | 5.94165e-57 | 1.86686e-56 | 2.62897e-56 | 2.7827e-56 | -5.15338e-46 | 0 | 1.26431e-25 | -1.26431e-25 | 0.124114
    0.001 | 3.28764e-39 | 1.06051e-38 | 1.49395e-38 | 1.57895e-38 | 1.59122e-38 | 1.5528e-38 | 1.59314e-38 | 0.000300048 | 2.48642e-06 | 0.000297561 | 1.6
    0.002 | 1.01318e-36 | 9.48329e-37 | 9.2736e-37 | 9.19816e-37 | 9.41228e-37 | 9.29841e-37 | -6.06935e-36 | 8.1399e-05 | 2.14539e-05 | 5.99451e-05 | 1.6
    0.003 | 3.9505e-37 | 3.16943e-37 | 3.10764e-37 | 3.09965e-37 | 5.45821e-38 | 3.09248e-37 | 3.18496e-37 | 2.85518e-05 | 1.32877e-05 | 1.52641e-05 | 1.6
    0.004 | 1.48141e-37 | 1.26762e-37 | 1.24262e-37 | -7.13801e-39 | 1.25358e-37 | 5.4134e-37 | 1.22957e-37 | 1.46352e-05 | 1.04662e-05 | 4.16905e-06 | 1.6
    0.005 | 6.50478e-38 | 5.65024e-38 | 5.56596e-38 | 7.65273e-38 | 5.5354e-38 | 8.47915e-37 | 5.55841e-38 | 1.03339e-05 | 8.91082e-06 | 1.4231e-06 | 1.6
    0.006 | 3.46765e-38 | 3.08736e-38 | -2.22331e-38 | 3.70306e-38 | 2.96959e-38 | 6.84824e-37 | 2.80473e-37 | 8.63027e-06 | 7.8999e-06 | 7.30376e-07 | 1.6
    0.007 | 1.90332e-38 | 1.79153e-38 | -3.5784e-38 | 1.78546e-38 | 1.76778e-38 | -1.64637e-36 | 1.80806e-38 | 7.63616e-06 | 7.16466e-06 | 4.71508e-07 | 1.6
    0.008 | 1.11505e-38 | 1.03181e-38 | -8.04734e-37 | 1.07186e-38 | -2.96785e-36 | 1.41351e-36 | 1.89367e-38 | 6.95133e-06 | 6.60251e-06 | 3.48816e-07 | 1.6
    0.009 | 7.44301e-39 | 6.75493e-39 | 9.78985e-38 | 6.58474e-39 | 3.38834e-37 | -5.21907e-37 | 5.18002e-39 | 6.43743e-06 | 6.15833e-06 | 2.79103e-07 | 1.6
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  tbl8: Table "phi_ann-0"
    // ECL (phi_em*kem*me*Aelec)
    Time (s) | phi_ann=1, quantum-yield-adjusted ECL emission rate (mol/s) | phi_ann=0.8, quantum-yield-adjusted ECL emission rate (mol/s) | phi_ann=0.5, quantum-yield-adjusted ECL emission rate (mol/s) | phi_ann=0.2, quantum-yield-adjusted ECL emission rate (mol/s) | phi_ann=0.1, quantum-yield-adjusted ECL emission rate (mol/s) | phi_ann=0.05, quantum-yield-adjusted ECL emission rate (mol/s) | phi_ann=0.01, quantum-yield-adjusted ECL emission rate (mol/s) | phi_ann=0.001, quantum-yield-adjusted ECL emission rate (mol/s) | phi_ann=1E-4, quantum-yield-adjusted ECL emission rate (mol/s) | phi_ann=1E-6, quantum-yield-adjusted ECL emission rate (mol/s)
    0 | 5.25793e-56 | 4.20635e-56 | 2.62897e-56 | 1.05159e-56 | 5.25793e-57 | 2.62897e-57 | 5.25793e-58 | 5.25793e-59 | 5.25793e-60 | 5.25793e-62
    0.001 | 3.1814e-38 | 2.32273e-38 | 1.59122e-38 | 6.47571e-39 | 5.79127e-39 | 1.24619e-39 | 4.08453e-40 | 3.04622e-41 | -2.35666e-41 | -2.36604e-41
    0.002 | 1.82844e-36 | 5.2077e-36 | 9.41228e-37 | 3.69593e-37 | 1.84706e-37 | 1.45397e-37 | 1.8282e-38 | 1.8067e-39 | 5.74877e-36 | 1.10973e-40
    0.003 | 1.03684e-36 | 5.16157e-37 | 5.45821e-38 | 1.04605e-35 | 5.22473e-38 | 4.64002e-39 | -7.73415e-38 | -6.02615e-40 | 1.01302e-35 | -1.10589e-35
    0.004 | 2.45649e-37 | 2.13681e-37 | 1.25358e-37 | 2.57649e-38 | 2.46309e-38 | 1.95767e-41 | 1.30687e-36 | 2.49382e-40 | -2.29558e-38 | 2.50837e-38
    0.005 | 1.09824e-37 | 8.05858e-38 | 5.5354e-38 | 2.17615e-38 | 1.11399e-38 | 1.04401e-39 | -2.75412e-37 | 1.07294e-40 | -4.9486e-40 | 5.50233e-40
    0.006 | 5.97018e-38 | 4.84143e-38 | 2.96959e-38 | 1.19002e-38 | 5.94884e-39 | 3.50217e-39 | -6.27317e-39 | 5.5342e-41 | 2.29709e-41 | -2.48395e-41
    0.007 | -8.52998e-37 | 2.8323e-38 | 1.76778e-38 | 1.63106e-38 | 2.45212e-39 | 1.09442e-38 | 5.22349e-39 | 4.45171e-39 | 1.4693e-38 | 1.46886e-38
    0.008 | 3.2951e-37 | 1.72478e-38 | -2.96785e-36 | 6.94667e-39 | 3.04322e-40 | 6.36999e-39 | -1.50656e-39 | -1.54658e-39 | -5.21256e-39 | -5.21404e-39
    0.009 | 3.11729e-38 | 1.05307e-38 | 3.38834e-37 | 9.04911e-39 | -1.18091e-39 | 1.00533e-38 | 1.31135e-41 | -1.11556e-40 | -4.13724e-40 | -4.14969e-40
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  tbl9: Table "phi_em-0"
    // ECL (phi_em*kem*me*Aelec)
    Time (s) | phi_em=1, quantum-yield-adjusted ECL emission rate (mol/s) | phi_em=0.8, quantum-yield-adjusted ECL emission rate (mol/s) | phi_em=0.5, quantum-yield-adjusted ECL emission rate (mol/s) | phi_em=0.2, quantum-yield-adjusted ECL emission rate (mol/s) | phi_em=0.1, quantum-yield-adjusted ECL emission rate (mol/s) | phi_em=0.05, quantum-yield-adjusted ECL emission rate (mol/s) | phi_em=0.01, quantum-yield-adjusted ECL emission rate (mol/s) | phi_em=0.001, quantum-yield-adjusted ECL emission rate (mol/s) | phi_em=1E-4, quantum-yield-adjusted ECL emission rate (mol/s) | phi_em=1E-6, quantum-yield-adjusted ECL emission rate (mol/s) | phi_em=1, total external current; equals faradaic current when RC_on=0 (A), Point: 1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
    0 | 5.25793e-55 | 4.20635e-55 | 2.62897e-55 | 1.05159e-55 | 5.25793e-56 | 2.62897e-56 | 5.25793e-57 | 5.25793e-58 | 5.25793e-59 | 5.25793e-61 | 0
    0.001 | 3.18244e-37 | 2.54595e-37 | 1.59122e-37 | 6.36488e-38 | 3.18244e-38 | 1.59122e-38 | 3.18244e-39 | 3.18244e-40 | 3.18244e-41 | 3.18244e-43 | 0.000300045
    0.002 | 1.88246e-35 | 1.50597e-35 | 9.41228e-36 | 3.76491e-36 | 1.88246e-36 | 9.41228e-37 | 1.88246e-37 | 1.88246e-38 | 1.88246e-39 | 1.88246e-41 | 8.1406e-05
    0.003 | 1.09164e-36 | 8.73313e-37 | 5.45821e-37 | 2.18328e-37 | 1.09164e-37 | 5.45821e-38 | 1.09164e-38 | 1.09164e-39 | 1.09164e-40 | 1.09164e-42 | 2.8592e-05
    0.004 | 2.50716e-36 | 2.00573e-36 | 1.25358e-36 | 5.01432e-37 | 2.50716e-37 | 1.25358e-37 | 2.50716e-38 | 2.50716e-39 | 2.50716e-40 | 2.50716e-42 | 1.46428e-05
    0.005 | 1.10708e-36 | 8.85664e-37 | 5.5354e-37 | 2.21416e-37 | 1.10708e-37 | 5.5354e-38 | 1.10708e-38 | 1.10708e-39 | 1.10708e-40 | 1.10708e-42 | 1.03434e-05
    0.006 | 5.93917e-37 | 4.75134e-37 | 2.96959e-37 | 1.18783e-37 | 5.93917e-38 | 2.96959e-38 | 5.93917e-39 | 5.93917e-40 | 5.93917e-41 | 5.93917e-43 | 8.60133e-06
    0.007 | 3.53555e-37 | 2.82844e-37 | 1.76778e-37 | 7.0711e-38 | 3.53555e-38 | 1.76778e-38 | 3.53555e-39 | 3.53555e-40 | 3.53555e-41 | 3.53555e-43 | 7.64168e-06
    0.008 | -5.9357e-35 | -4.74856e-35 | -2.96785e-35 | -1.18714e-35 | -5.9357e-36 | -2.96785e-36 | -5.9357e-37 | -5.9357e-38 | -5.9357e-39 | -5.9357e-41 | 6.9625e-06
    0.009 | 6.77669e-36 | 5.42135e-36 | 3.38834e-36 | 1.35534e-36 | 6.77669e-37 | 3.38834e-37 | 6.77669e-38 | 6.77669e-39 | 6.77669e-40 | 6.77669e-42 | 6.43698e-06
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  tbl10: Table "tau=10-1"
    // ECL (phi_em*kem*me*Aelec)
    Time (s) | tau=10, quantum-yield-adjusted ECL emission rate (mol/s)
    0 | 6.04974e-53
    3.14159e-05 | -1.0727e-50
    6.28319e-05 | -8.6336e-50
    9.42478e-05 | -9.25058e-50
    0.000125664 | -1.16784e-49
    0.00015708 | -1.41131e-48
    0.000188496 | -3.33529e-48
    0.000219911 | -1.89946e-48
    0.000251327 | 9.62092e-49
    0.000282743 | 4.04862e-48
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  tbl11: Table "tau=1"
    // ECL (phi_em*kem*me*Aelec)
    Time (s) | tau=1, quantum-yield-adjusted ECL emission rate (mol/s)
    0 | 2.62897e-56
    3.14159e-05 | -5.64157e-53
    6.28319e-05 | 2.63022e-46
    9.42478e-05 | 4.9659e-47
    0.000125664 | -3.48616e-47
    0.00015708 | -3.30997e-47
    0.000188496 | 1.86591e-48
    0.000219911 | 2.8465e-48
    0.000251327 | 2.82555e-48
    0.000282743 | 1.47411e-48
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  tbl12: Table "tau=0.1"
    // ECL (phi_em*kem*me*Aelec)
    Time (s) | tau=0.1, quantum-yield-adjusted ECL emission rate (mol/s) | tau=0.1, total external current; equals faradaic current when RC_on=0 (A), Point: 1 | tau=0.1, faradaic current (A), Point: 1 | tau=0.1, double-layer charging current; zero when RC_on=0 (A), Point: 1 | tau=0.1, programmed applied potential (V), Point: 1 | tau=0.1, interfacial potential; equals programmed potential when RC_on=0 (V), Point: 1
    0 | 1.56601e-56 | 0 | 7.8467e-25 | -7.8467e-25 | 0.124114 | 0.124114
    1e-05 | 1.08893e-55 | 0.00145267 | 2.23808e-25 | 0.00145267 | 1.6 | 0.147333
    2e-05 | 1.52535e-55 | 0.00142983 | 5.85507e-25 | 0.00142983 | 1.6 | 0.170166
    3e-05 | 2.22358e-55 | 0.00140733 | 1.30098e-24 | 0.00140733 | 1.6 | 0.192667
    4e-05 | 3.43354e-55 | 0.00138513 | 3.17896e-24 | 0.00138513 | 1.6 | 0.214871
    5e-05 | 5.44845e-55 | 0.00136327 | 5.97994e-24 | 0.00136327 | 1.6 | 0.236734
    6e-05 | 1.22604e-54 | 0.00134174 | 1.93408e-23 | 0.00134174 | 1.6 | 0.258259
    7e-05 | 2.34194e-54 | 0.00132055 | 3.28174e-23 | 0.00132055 | 1.6 | 0.279445
    8e-05 | -2.93014e-51 | 0.00129969 | 2.43757e-22 | 0.00129969 | 1.6 | 0.300306
    9e-05 | -1.17303e-50 | 0.00127915 | 4.46318e-22 | 0.00127915 | 1.6 | 0.320855
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  tbl13: Table
    // ECL (phi_em*kem*me*Aelec)
    Time (s) | E01ox=1, E_an=1.4, quantum-yield-adjusted ECL emission rate (mol/s) | E01ox=1.2, E_an=1.6, quantum-yield-adjusted ECL emission rate (mol/s) | E01ox=1.4, E_an=1.8, quantum-yield-adjusted ECL emission rate (mol/s) | E01ox=1.6, E_an=2, quantum-yield-adjusted ECL emission rate (mol/s) | E01ox=1.8, E_an=2.2, quantum-yield-adjusted ECL emission rate (mol/s) | E01ox=1, E_an=1.4, total external current; equals faradaic current when RC_on=0 (A), Point: 1 | E01ox=1, E_an=1.4, faradaic current (A), Point: 1 | E01ox=1, E_an=1.4, double-layer charging current; zero when RC_on=0 (A), Point: 1 | E01ox=1, E_an=1.4, programmed applied potential (V), Point: 1 | E01ox=1, E_an=1.4, interfacial potential; equals programmed potential when RC_on=0 (V), Point: 1 | E01ox=1.2, E_an=1.6, total external current; equals faradaic current when RC_on=0 (A), Point: 1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
    0 | 1.52882e-49 | 6.33973e-53 | 2.62897e-56 | 1.09018e-59 | 1.06734e-47 | 0 | 1.66006e-20 | -1.66006e-20 | 0.0225069 | 0.0225069 | 0
    3.14159e-05 | 1.43546e-48 | 6.04345e-52 | 2.64347e-55 | 1.16673e-58 | 3.63433e-49 | 0.00131079 | 1.26436e-19 | 0.00131079 | 1.4 | 0.0892143 | 0.00140467
    6.28319e-05 | 9.15091e-48 | 2.94006e-51 | 1.57248e-54 | 8.47939e-58 | 8.06822e-50 | 0.00124684 | 1.95181e-18 | 0.00124684 | 1.4 | 0.153155 | 0.00133625
    9.42478e-05 | 1.21098e-46 | 2.90972e-50 | 2.56333e-53 | -3.10671e-55 | 1.6123e-48 | 0.001186 | 3.5879e-17 | 0.001186 | 1.4 | 0.214004 | 0.00127106
    0.000125664 | 8.11972e-46 | 9.4811e-49 | 1.30076e-51 | -8.08344e-53 | 5.45313e-48 | 0.00112806 | 1.29702e-16 | 0.00112806 | 1.4 | 0.271936 | 0.00120899
    0.00015708 | 5.74595e-45 | 4.38468e-48 | 4.47924e-51 | -2.3849e-52 | -2.3264e-48 | 0.00107294 | 1.93819e-15 | 0.00107294 | 1.4 | 0.327064 | 0.00114989
    0.000188496 | 2.41799e-44 | 3.53144e-47 | 6.11444e-50 | -2.39091e-52 | -8.29329e-48 | 0.00102053 | 1.8561e-14 | 0.00102053 | 1.4 | 0.379469 | 0.00109366
    0.000219911 | 1.28248e-43 | 1.22137e-46 | 1.9231e-49 | -1.00699e-52 | -1.65512e-48 | 0.000970644 | 5.97225e-14 | 0.000970644 | 1.4 | 0.429356 | 0.00104019
    0.000251327 | 7.07715e-43 | 1.09159e-45 | 2.30182e-48 | 3.18016e-51 | 4.29978e-49 | 0.000923213 | 5.60364e-13 | 0.000923213 | 1.4 | 0.476787 | 0.000989322
    0.000282743 | 2.28569e-42 | 3.22225e-45 | 7.00309e-48 | 1.10715e-50 | 3.38961e-49 | 0.00087812 | 3.42397e-12 | 0.00087812 | 1.4 | 0.52188 | 0.000940976
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
Plots
  pg3: PlotGroup1D "1D Plot Group 3" | data = dset1
    tblp1: Table "Table Graph 1"
      table = tbl13
      xaxisdata = auto
      plotcolumninput = manual
      plotcolumns = 2
      preprocx = linear
    tblp2: Table "Table Graph 2"
      table = tbl13
      xaxisdata = auto
      plotcolumninput = manual
      plotcolumns = {2, 3, 4, 5, 6}
  pg4: PlotGroup1D "Concentration (tds) 1" (disabled) | data = dset3
    lngr1: LineGraph on domains 1 | expr = m
  pg5: PlotGroup1D "Concentration (tds)" (disabled) | data = dset4
    lngr1: LineGraph on domains 1 | expr = m
  pg6: PlotGroup1D "Concentration (tds) 2" | data = dset6
    lngr1: LineGraph on domains 1 | data = dset6; expr = m